// SBML level 3 version 2

function conc(q, vol)
  piecewise(q/vol, vol > 1e-5, 0);
end

function metab_MM(Vmax, Km, PC, q, vol)
  vol*Vmax*conc(q, vol)/(PC*Km + conc(q, vol));
end

function metab_MA(CLH, PC, q, vol)
  CLH*conc(q, vol)/PC;
end

model euromix()

  // Compartments:
  compartment Air = 1;
  compartment Urine = 1;
  compartment Fat;
  compartment Rich;
  compartment Liver;
  compartment Art;
  compartment Ven;
  compartment Skin_e;
  compartment Skin_u;
  compartment Skin_sc_e;
  compartment Skin_sc_u;
  compartment Poor;
  compartment Gut = 1;

  // Species:
  substanceOnly species QFat in Fat = 0;
  substanceOnly species QRich in Rich = 0;
  substanceOnly species QPoor in Poor = 0;
  substanceOnly species QLiver in Liver = 0;
  substanceOnly species QMetab in Liver = 0;
  substanceOnly species QGut in Gut = 0;
  substanceOnly species QSkin_u in Skin_u = 0;
  substanceOnly species QSkin_e in Skin_e = 0;
  substanceOnly species QSkin_sc_u in Skin_sc_u = 0;
  substanceOnly species QSkin_sc_e in Skin_sc_e = 0;
  substanceOnly species QArt in Art = 0;
  substanceOnly species QVen in Ven = 0;
  substanceOnly species QExcret in Urine = 0;
  substanceOnly species QAir in Air = 0;

  // Parameters:
  BM = 70;
  BSA = 190;
  Height_sc = 0.0001;
  Height_vs = 0.0122;
  scVFat = 0.209;
  scVRich = 0.105;
  scVLiver = 0.024;
  scVBlood = 0.068;
  scFBlood = 4.8;
  scFFat = 0.085;
  scFPoor = 0.12;
  scFLiver = 0.27;
  scFSkin = 0.05;
  Falv = 2220;
  rho = 1;
  PCFat = 2.53;
  PCLiver = 0.923;
  PCRich = 0.875;
  PCPoor = 0.647;
  PCSkin_sc = 0.889;
  PCSkin = 0.889;
  PCAir = 1e99;
  Km = 0;
  Michaelis = 0;
  Vmax = 0;
  fub = 0.51;
  fSA_exposed = 0.1;
  Kp_sc_vs = 0.01;
  kGut = 1;
  CLH = 132;
  Ke = 7.5;

  // Assignment rules:
  Fat := BM*scVFat/rho;
  Rich := BM*scVRich/rho;
  Liver := BM*scVLiver/rho;
  Art := VBlood/3;
  Ven := VBlood - Art;
  Skin_e := BSA*Height_vs*fSA_exposed;
  Skin_u := BSA*Height_vs*(1 - fSA_exposed);
  Skin_sc_e := BSA*Height_sc*fSA_exposed;
  Skin_sc_u := BSA*Height_sc*(1 - fSA_exposed);
  Poor := BM/rho - Fat - Rich - Liver - Skin_e - Skin_u - Skin_sc_e - Skin_sc_u - VBlood - 0.1*(BM/rho);
  f_su := Kp_sc_vs*BSA*(1 - fSA_exposed);
  f_se := Kp_sc_vs*BSA*fSA_exposed;
  VBlood := BM*scVBlood/rho;
  FBlood := scFBlood*BM;
  FFat := FBlood*scFFat;
  FPoor := FBlood*scFPoor;
  FLiver := FBlood*scFLiver;
  FSkin := FBlood*scFSkin;
  FRich := FBlood - FFat - FPoor - FLiver - FSkin;
  FSkin_e := FSkin*fSA_exposed;
  FSkin_u := FSkin - FSkin_e;

  // Reactions:
  _J0: QArt -> QFat; FFat*conc(QArt, Art);
  _J1: QFat -> QVen; FFat*conc(QFat, Fat)/PCFat;
  _J2: QArt -> QRich; FRich*conc(QArt, Art);
  _J3: QRich -> QVen; FRich*conc(QRich, Rich)/PCRich;
  _J4: QArt -> QPoor; FPoor*conc(QArt, Art);
  _J5: QPoor -> QVen; FPoor*conc(QPoor, Poor)/PCPoor;
  _J6: QArt -> QLiver; FLiver*conc(QArt, Art);
  _J7: QLiver -> QVen; FLiver*conc(QLiver, Liver)/PCLiver;
  _J8: QGut -> QLiver; kGut*QGut;
  _J9: QArt -> QSkin_u; FSkin_u*conc(QArt, Art);
  _J10: QSkin_u -> QVen; FSkin_u*conc(QSkin_u, Skin_u)/PCSkin;
  _J11: QSkin_u -> QSkin_sc_u; f_su*conc(QSkin_u, Skin_u)/PCSkin_sc;
  _J12: QSkin_sc_u -> QSkin_u; f_su*conc(QSkin_sc_u, Skin_sc_u);
  _J13: QArt -> QSkin_e; FSkin_e*conc(QArt, Art);
  _J14: QSkin_e -> QVen; FSkin_e*conc(QSkin_e, Skin_e)/PCSkin;
  _J15: QSkin_e -> QSkin_sc_e; f_se*conc(QSkin_e, Skin_e)/PCSkin_sc;
  _J16: QSkin_sc_e -> QSkin_e; f_se*conc(QSkin_sc_e, Skin_sc_e);
  _J17: QVen -> QArt; FBlood*conc(QVen, Ven);
  _J18: QLiver -> QMetab; fub*piecewise(metab_MM(Vmax, Km, PCLiver, QLiver, Liver), Michaelis > 0.5, metab_MA(CLH, PCLiver, QLiver, Liver));
  _J19: QArt -> QExcret; Ke*fub*conc(QArt, Art);
  _J20: QArt -> QAir; Falv*conc(QArt, Art)/PCAir;
  _J21: QAir -> QArt; FBlood*conc(QAir, Air);
end
